# LJ

print           "Seed: ${seed}"

units		metal
atom_style	atomic
boundary 	p p p


#read_restart	pol.restart_300_1

lattice 	fcc 5
region          box block 0 10 0 10 0 10 units lattice
create_box	1 box

region 		cryst block 3 6 3 6 3 6 units lattice
create_atoms 	1 region cryst

mass		1 50

pair_style	runner dir ../runner
pair_coeff	* * 8

velocity 	all create 50.0 ${seed} mom yes rot yes

thermo		100
thermo_style 	custom step temp pe
timestep	0.002
dump		2 all custom 100 first.lammpstrj id type x y z element fx fy fz
write_dump	all xyz pos.xyz modify element C
restart 	50000 restart1 restart2

fix 		1 all nvt temp 3000.0 50.0 1.0
run		40000
